# OpenSim document version 40500
Model:
  Ground
  BodySet:
    Body talus_l_b: mass=0.1 [kg] inertia=(0.001 0.001 0.001 0 0 0)
      PhysicalOffsetFrame l_talus_offset: socket_parent=..
          translation=(-0.004152374 0.0008737501 -0.0002741218) [meters] meshes=l_talus.vtp
    Body talus_r_b: mass=1 inertia=(0.01 0.01 0.01 0 0 0)
      PhysicalOffsetFrame r_talus_offset: socket_parent=.. translation=(-0.004152376 0.0008737501 0.0002741292)
          meshes=r_talus.vtp
    Body calcn_l_b: mass=1 inertia=(0.01 0.01 0.01 0 0 0)
      PhysicalOffsetFrame l_foot_offset: socket_parent=.. translation=(-0.06525637 -0.0124485 0.002398498)
          meshes=l_foot.vtp
    Body toes_l_b: mass=0.2 inertia=(0.002 0.002 0.002 0 0 0)
      PhysicalOffsetFrame l_bofoot_offset: socket_parent=.. translation=(-0.01535025 0.0007818742 0.006206632)
          meshes=l_bofoot.vtp
    Body calcn_r_b: mass=0.1 inertia=(0.001 0.001 0.001 0 0 0)
      PhysicalOffsetFrame r_foot_offset: socket_parent=.. translation=(-0.06525637 -0.0124485 -0.002398498)
          meshes=r_foot.vtp
    Body toes_r_b: mass=0.2 inertia=(0.002 0.002 0.002 0 0 0)
      PhysicalOffsetFrame r_bofoot_offset: socket_parent=.. translation=(-0.01535025 0.0007818742 -0.006206632)
          meshes=r_bofoot.vtp
  JointSet:
    WeldJoint talus_l_b_to_ground: socket_parent_frame=ground_offset socket_child_frame=talus_l_b_offset
      PhysicalOffsetFrame ground_offset: socket_parent=/ground translation=(-0.02831317 0.01629844 -0.09313005)
      PhysicalOffsetFrame talus_l_b_offset: socket_parent=/bodyset/talus_l_b
    WeldJoint talus_r_b_to_ground: socket_parent_frame=ground_offset socket_child_frame=talus_r_b_offset
      PhysicalOffsetFrame ground_offset: socket_parent=/ground translation=(-0.02831363 0.01629826 0.09312987)
      PhysicalOffsetFrame talus_r_b_offset: socket_parent=/bodyset/talus_r_b
    CustomJoint calcn_l_to_talus_l: socket_parent_frame=talus_l_b_offset socket_child_frame=calcn_l_b_offset
      Coordinate rx: default_value=0 range=(-9.424778 9.424778)
      PhysicalOffsetFrame talus_l_b_offset: socket_parent=/bodyset/talus_l_b
          translation=(0.003159169 -0.009941192 -0.003109947)
      PhysicalOffsetFrame calcn_l_b_offset: socket_parent=/bodyset/calcn_l_b
          translation=(-0.02261363 0.009096002 0.00422284)
      SpatialTransform:
        TransformAxis rotation1: axis=(1 0 0)
        TransformAxis rotation2: axis=(0 1 0)
        TransformAxis rotation3: coordinates=rx axis=(0 0 1) LinearFunction(coefficients=1 0)
        TransformAxis translation1: axis=(1 0 0)
        TransformAxis translation2: axis=(0 1 0)
        TransformAxis translation3: axis=(0 0 1)
    WeldJoint toes_l_to_calcn_l: socket_parent_frame=calcn_l_b_offset socket_child_frame=toes_l_b_offset
      PhysicalOffsetFrame calcn_l_b_offset: socket_parent=/bodyset/calcn_l_b
          translation=(0.04244531 -0.006615061 -0.001854956)
      PhysicalOffsetFrame toes_l_b_offset: socket_parent=/bodyset/toes_l_b
          translation=(-0.04244531 0.006615061 0.001854956)
    CustomJoint calcn_r_to_talus_r: socket_parent_frame=talus_r_b_offset socket_child_frame=calcn_r_b_offset
      Coordinate rx: default_value=0 range=(-9.424778 9.424778)
      PhysicalOffsetFrame talus_r_b_offset: socket_parent=/bodyset/talus_r_b
          translation=(0.003159625 -0.009941249 0.003110126)
      PhysicalOffsetFrame calcn_r_b_offset: socket_parent=/bodyset/calcn_r_b
          translation=(-0.02261437 0.009095499 -0.004117496)
      SpatialTransform:
        TransformAxis rotation1: axis=(1 0 0)
        TransformAxis rotation2: axis=(0 1 0)
        TransformAxis rotation3: coordinates=rx axis=(0 0 1) LinearFunction(coefficients=1 0)
        TransformAxis translation1: axis=(1 0 0)
        TransformAxis translation2: axis=(0 1 0)
        TransformAxis translation3: axis=(0 0 1)
    WeldJoint toes_r_to_calcn_r: socket_parent_frame=calcn_r_b_offset socket_child_frame=toes_r_b_offset
      PhysicalOffsetFrame calcn_r_b_offset: socket_parent=/bodyset/calcn_r_b
          translation=(0.04244494 -0.006615187 0.001907565)
      PhysicalOffsetFrame toes_r_b_offset: socket_parent=/bodyset/toes_r_b
          translation=(-0.04244494 0.006615188 -0.001907572)
  MarkerSet:
    Marker RHEE: calcn_r_b (-0.08624209 0.02727205 -0.01069182)
    Marker LHEE: calcn_l_b (-0.08440824 0.02809521 0.01110764)
    Marker LTOE: toes_l_b (-0.06489013 0.04566179 0.005470581)
    Marker RTOE: toes_r_b (-0.0606898 0.04602027 -0.00304026)
