# OpenSim document version 40000
JointModelPersonalizationTool:
  input_model_file: PGM_SYDNEY_scaled_copy.osim
  output_model_file: PGM_SYDNEY_03_optimized.osim
  desired_error: 0.01
  accuracy: 1e-6
  diff_min_change: 1e-4
  optimality_tolerance: 1e-6
  function_tolerance: 1e-6
  step_tolerance: 1e-6
  max_function_evaluations: 3e3
  JMPTaskList:
    JMPTask Left Knee: is_enabled=true marker_file_name=S4-AMGait03.trc
      JMPJoint tibfib_l_to_femur_l:
        parent_frame_transformation: translation=(false false false) orientation=(true true false)
            translation_bounds=0.1 orientation_bounds=0.1 [radians]
        child_frame_transformation: translation=(false false false) orientation=(true true false)
            translation_bounds=0.1 orientation_bounds=0.1 [radians]
    JMPTask Right Knee: is_enabled=true marker_file_name=S4-AMGait03.trc
      JMPJoint tibfib_r_to_femur_r:
        parent_frame_transformation: translation=(false false false) orientation=(true true false)
            translation_bounds=0.1 orientation_bounds=0.1
        child_frame_transformation: translation=(false false false) orientation=(true true false)
            translation_bounds=0.1 orientation_bounds=0.1
