# OpenSim document version 40500
Model:
  Ground
  BodySet:
    Body talus_l: mass=0.1 [kg] mass_center=(0 0 0) inertia=(0.001 0.001 0.001 0 0 0) meshes=l_talus.vtp
    Body talus_r: mass=0.1 mass_center=(0 0 0) inertia=(0.001 0.001 0.001 0 0 0) meshes=r_talus.vtp
    Body calcn_l: mass=1.25 mass_center=(0.1 0.03 0) inertia=(0.0014 0.0039 0.0041 0 0 0) meshes=l_foot.vtp
    Body toes_l: mass=0.2166 mass_center=(0.0346 0.006 0.0175) inertia=(0.0001 0.0002 0.001 0 0 0) meshes=l_bofoot.vtp
    Body calcn_r: mass=1.25 mass_center=(0.1 0.03 0) inertia=(0.0014 0.0039 0.0041 0 0 0) meshes=r_foot.vtp
    Body toes_r: mass=0.2166 mass_center=(0.0346 0.006 -0.0175) inertia=(0.0001 0.0002 0.001 0 0 0) meshes=r_bofoot.vtp
  JointSet:
    WeldJoint talus_l_to_ground: socket_parent_frame=ground_offset socket_child_frame=talus_l_offset
      PhysicalOffsetFrame ground_offset: socket_parent=/ground translation=(-0.0751999 0.0580793 -0.0835) [meters]
      PhysicalOffsetFrame talus_l_offset: socket_parent=/bodyset/talus_l
    WeldJoint talus_r_to_ground: socket_parent_frame=ground_offset socket_child_frame=talus_r_offset
      PhysicalOffsetFrame ground_offset: socket_parent=/ground translation=(-0.0751999 0.0580793 0.0835)
      PhysicalOffsetFrame talus_r_offset: socket_parent=/bodyset/talus_r
    PinJoint subtalar_r: socket_parent_frame=talus_r_offset socket_child_frame=calcn_r_offset
      Coordinate subtalar_angle_r: default_value=0 range=(-0.6108652 0.6108652) clamped=true
      PhysicalOffsetFrame talus_r_offset: socket_parent=/bodyset/talus_r translation=(-0.04877 -0.04195 0.00792)
          orientation=(-1.76819 0.906223 1.8196) [radians]
      PhysicalOffsetFrame calcn_r_offset: socket_parent=/bodyset/calcn_r translation=(0 0 0)
          orientation=(-1.76819 0.906223 1.8196)
    PinJoint mtp_r: socket_parent_frame=calcn_r_offset socket_child_frame=toes_r_offset
      Coordinate mtp_angle_r: default_value=0 range=(-0.7853982 0.5235988) clamped=true
      PhysicalOffsetFrame calcn_r_offset: socket_parent=/bodyset/calcn_r translation=(0.1788 -0.002 0.00108)
          orientation=(-3.14159 0.619901 0)
      PhysicalOffsetFrame toes_r_offset: socket_parent=/bodyset/toes_r translation=(0 0 0)
          orientation=(-3.14159 0.619901 0)
    PinJoint subtalar_l: socket_parent_frame=talus_l_offset socket_child_frame=calcn_l_offset
      Coordinate subtalar_angle_l: default_value=0 range=(-0.6108652 0.6108652) clamped=true
      PhysicalOffsetFrame talus_l_offset: socket_parent=/bodyset/talus_l translation=(-0.04877 -0.04195 -0.00792)
          orientation=(1.76819 -0.906223 1.8196)
      PhysicalOffsetFrame calcn_l_offset: socket_parent=/bodyset/calcn_l translation=(0 0 0)
          orientation=(1.76819 -0.906223 1.8196)
    PinJoint mtp_l: socket_parent_frame=calcn_l_offset socket_child_frame=toes_l_offset
      Coordinate mtp_angle_l: default_value=0 range=(-0.7853982 0.5235988) clamped=true
      PhysicalOffsetFrame calcn_l_offset: socket_parent=/bodyset/calcn_l translation=(0.1788 -0.002 -0.00108)
          orientation=(-3.14159 -0.619901 0)
      PhysicalOffsetFrame toes_l_offset: socket_parent=/bodyset/toes_l translation=(0 0 0)
          orientation=(-3.14159 -0.619901 0)
  MarkerSet:
    Marker RHEE: calcn_r (-0.02 0.02 0)
    Marker LHEE: calcn_l (-0.02 0.02 0)
    Marker LTOE_osim: toes_l (-0.0606898 0.04602027 0.00304026)
    Marker RTOE_osim: toes_r (-0.0606898 0.04602027 -0.00304026)
    Marker LTOE_tip: toes_l (0.0593866 0.0126158 -0.0110337)
    Marker RTOE_tip: toes_r (0.0593866 0.0126158 0.0110337)
    Marker RASI: ground (0.02 0.98 0.128)
    Marker LASI: ground (0.02 0.98 -0.128)
    Marker RKNE: ground (-0.0707 0.4799 0.1335)
    Marker RANK: ground (-0.0801999 0.0780793 0.1365)
    Marker LKNE: ground (-0.0707 0.4799 -0.1335)
    Marker LANK: ground (-0.0801999 0.0780793 -0.1365)
    Marker RTOE: toes_r (-0.0007984 0.022 0.006894372)
    Marker LTOE: toes_l (-0.0007984 0.022 -0.0068944)
