# OpenSim document version 40500
InverseKinematicsTool:
  time_range: 0.4 3.92
  marker_file: Inputs/kneeoptimisation.trc
  IKTaskSet:
    IKMarkerTask RHEE: apply=true weight=1
    IKMarkerTask LHEE: apply=true weight=1
    IKMarkerTask LTOE: apply=true weight=1
    IKMarkerTask RTOE: apply=true weight=1
    IKMarkerTask RASI: apply=true weight=5
    IKMarkerTask LASI: apply=true weight=5
    IKMarkerTask RPSI: apply=true weight=1
    IKMarkerTask LPSI: apply=true weight=1
    IKMarkerTask LTHI: apply=true weight=1
    IKMarkerTask LKNE: apply=true weight=2.5
    IKMarkerTask RTHI: apply=true weight=1
    IKMarkerTask RKNE: apply=true weight=2.5
    IKMarkerTask LANK: apply=true weight=10
    IKMarkerTask LTIB: apply=true weight=1
    IKMarkerTask RANK: apply=true weight=10
    IKMarkerTask RTIB: apply=true weight=1
