# OpenSim document version 40500
Model Jinella_01_Optimised:
  Ground
  BodySet:
    Body talus_l_b: mass=0.1 [kg] inertia=(0.001 0.001 0.001 0 0 0)
      PhysicalOffsetFrame l_talus_offset: socket_parent=..
          translation=(-0.004152374 0.0008737501 -0.0002741218) [meters] meshes=l_talus.vtp
    Body talus_r_b: mass=1 inertia=(0.01 0.01 0.01 0 0 0)
      PhysicalOffsetFrame r_talus_offset: socket_parent=.. translation=(-0.004152376 0.0008737501 0.0002741292)
          meshes=r_talus.vtp
    Body calcn_l_b: mass=1 inertia=(0.01 0.01 0.01 0 0 0)
      PhysicalOffsetFrame l_foot_offset: socket_parent=.. translation=(-0.06525637 -0.0124485 0.002398498)
          meshes=l_foot.vtp
    Body toes_l_b: mass=0.2 inertia=(0.002 0.002 0.002 0 0 0)
      PhysicalOffsetFrame l_bofoot_offset: socket_parent=.. translation=(-0.01535025 0.0007818742 0.006206632)
          meshes=l_bofoot.vtp
    Body calcn_r_b: mass=0.1 inertia=(0.001 0.001 0.001 0 0 0)
      PhysicalOffsetFrame r_foot_offset: socket_parent=.. translation=(-0.06525637 -0.0124485 -0.002398498)
          meshes=r_foot.vtp
    Body toes_r_b: mass=0.2 inertia=(0.002 0.002 0.002 0 0 0)
      PhysicalOffsetFrame r_bofoot_offset: socket_parent=.. translation=(-0.01535025 0.0007818742 -0.006206632)
          meshes=r_bofoot.vtp
    Body pelvis_b: mass=6.5 mass_center=(-0.01 0 0) inertia=(0.1 0.1 0.1 0 0 0)
      PhysicalOffsetFrame combined_pelvis_mesh_offset: socket_parent=.. translation=(-0.5231414 -0.8227672 0.02081813)
          orientation=(-1.5708 0 0) [radians]
          meshes=(C:/Users/jplu752/Documents/My Project Stuff/opensim_model_creator/src/opensim_model_creator/Participants/Jinella 01 Optimised\Meshes/combined_pelvis_mesh.stl)
    Body femur_l_b: mass=6 mass_center=(0 -0.125 0) inertia=(0.1 0.025 0.1 0 0 0)
      PhysicalOffsetFrame RCH01_predicted_mesh_left_femur_offset: socket_parent=..
          translation=(-0.5100137 -0.6140997 0.1111362) orientation=(-1.5708 0 0)
          meshes=(C:/Users/jplu752/Documents/My Project Stuff/opensim_model_creator/src/opensim_model_creator/Participants/Jinella 01 Optimised\Meshes/RCH01_predicted_mesh_left_femur.stl)
    Body femur_r_b: mass=6 mass_center=(0 -0.125 0) inertia=(0.1 0.025 0.1 0 0 0)
      PhysicalOffsetFrame RCH01_predicted_mesh_right_femur_offset: socket_parent=..
          translation=(-0.5282358 -0.6153138 -0.06131237) orientation=(-1.5708 0 0)
          meshes=(C:/Users/jplu752/Documents/My Project Stuff/opensim_model_creator/src/opensim_model_creator/Participants/Jinella 01 Optimised\Meshes/RCH01_predicted_mesh_right_femur.stl)
    Body tibfib_l_b: mass=2.5 mass_center=(0 -0.12 0) inertia=(0.025 0.0025 0.025 0 0 0)
      PhysicalOffsetFrame RCH01_predicted_mesh_left_tibfib_offset: socket_parent=..
          translation=(-0.5061751 -0.2712692 0.1219137) orientation=(-1.5708 0 0)
          meshes=(C:/Users/jplu752/Documents/My Project Stuff/opensim_model_creator/src/opensim_model_creator/Participants/Jinella 01 Optimised\Meshes/RCH01_predicted_mesh_left_tibfib.stl)
    Body tibfib_r_b: mass=2.5 mass_center=(0 -0.12 0) inertia=(0.025 0.0025 0.025 0 0 0)
      PhysicalOffsetFrame RCH01_predicted_mesh_right_tibfib_offset: socket_parent=..
          translation=(-0.5230502 -0.2728129 -0.06168406) orientation=(-1.5708 0 0)
          meshes=(C:/Users/jplu752/Documents/My Project Stuff/opensim_model_creator/src/opensim_model_creator/Participants/Jinella 01 Optimised\Meshes/RCH01_predicted_mesh_right_tibfib.stl)
  JointSet:
    CustomJoint calcn_l_to_talus_l: socket_parent_frame=talus_l_b_offset socket_child_frame=calcn_l_b_offset
      Coordinate subtalar_angle_l: default_value=0 range=(-1 1)
      PhysicalOffsetFrame talus_l_b_offset: socket_parent=/bodyset/talus_l_b
          translation=(0.003159169 -0.009941192 -0.003109947)
      PhysicalOffsetFrame calcn_l_b_offset: socket_parent=/bodyset/calcn_l_b
          translation=(-0.02261363 0.009096002 0.00422284)
      SpatialTransform:
        TransformAxis rotation1: coordinates=subtalar_angle_l axis=(-0.78718 -0.604747 -0.120949)
            LinearFunction(coefficients=1 0)
        TransformAxis rotation2: axis=(0 1 0)
        TransformAxis rotation3: axis=(-0.120949 0 0.78718)
        TransformAxis translation1: axis=(1 0 0)
        TransformAxis translation2: axis=(0 1 0)
        TransformAxis translation3: axis=(0 0 1)
    WeldJoint toes_l_to_calcn_l: socket_parent_frame=calcn_l_b_offset socket_child_frame=toes_l_b_offset
      PhysicalOffsetFrame calcn_l_b_offset: socket_parent=/bodyset/calcn_l_b
          translation=(0.04244531 -0.006615061 -0.001854956)
      PhysicalOffsetFrame toes_l_b_offset: socket_parent=/bodyset/toes_l_b
          translation=(-0.04244531 0.006615061 0.001854956)
    CustomJoint calcn_r_to_talus_r: socket_parent_frame=talus_r_b_offset socket_child_frame=calcn_r_b_offset
      Coordinate subtalar_angle_r: default_value=0 range=(-1 1)
      PhysicalOffsetFrame talus_r_b_offset: socket_parent=/bodyset/talus_r_b
          translation=(0.003159625 -0.009941249 0.003110126)
      PhysicalOffsetFrame calcn_r_b_offset: socket_parent=/bodyset/calcn_r_b
          translation=(-0.02261437 0.009095499 -0.004117496)
      SpatialTransform:
        TransformAxis rotation1: coordinates=subtalar_angle_r axis=(0.78718 0.604747 -0.120949)
            LinearFunction(coefficients=1 0)
        TransformAxis rotation2: axis=(0 1 0)
        TransformAxis rotation3: axis=(-0.120949 0 -0.78718)
        TransformAxis translation1: axis=(1 0 0)
        TransformAxis translation2: axis=(0 1 0)
        TransformAxis translation3: axis=(0 0 1)
    WeldJoint toes_r_to_calcn_r: socket_parent_frame=calcn_r_b_offset socket_child_frame=toes_r_b_offset
      PhysicalOffsetFrame calcn_r_b_offset: socket_parent=/bodyset/calcn_r_b
          translation=(0.04244494 -0.006615187 0.001907565)
      PhysicalOffsetFrame toes_r_b_offset: socket_parent=/bodyset/toes_r_b
          translation=(-0.04244494 0.006615188 -0.001907572)
    FreeJoint pelvis_to_ground: socket_parent_frame=ground_offset socket_child_frame=pelvis_b_offset
      Coordinate pelvis_list
      Coordinate pelvis_rotation
      Coordinate pelvis_tilt
      Coordinate pelvis_tx
      Coordinate pelvis_ty
      Coordinate pelvis_tz
      PhysicalOffsetFrame ground_offset: socket_parent=/ground translation=(0 0.7300276 0)
      PhysicalOffsetFrame pelvis_b_offset: socket_parent=/bodyset/pelvis_b translation=(0 0 0)
          orientation=(0 -0.03664966 0)
    CustomJoint femur_l_to_pelvis: socket_parent_frame=pelvis_b_offset socket_child_frame=femur_l_b_offset
      Coordinate hip_flexion_l: range=(-1.5 1.8)
      Coordinate hip_adduction_l: range=(-0.8 1.2)
      Coordinate hip_rotation_l: range=(-0.8 0.8)
      PhysicalOffsetFrame pelvis_b_offset: socket_parent=/bodyset/pelvis_b
          translation=(0.002254668 -0.04238928 -0.07018609) orientation=(-0.01257613 -0.03664966 -0.002310736)
      PhysicalOffsetFrame femur_l_b_offset: socket_parent=/bodyset/femur_l_b
          translation=(0.01538241 0.1662782 0.02013198) orientation=(-0.01257613 -0.03873276 -0.08817138)
      SpatialTransform:
        TransformAxis rotation1: coordinates=hip_flexion_l axis=(0 0 1) LinearFunction(coefficients=1 0)
        TransformAxis rotation2: coordinates=hip_adduction_l axis=(1 0 0) LinearFunction(coefficients=1 0)
        TransformAxis rotation3: coordinates=hip_rotation_l axis=(0 1 0) LinearFunction(coefficients=1 0)
        TransformAxis translation1: axis=(1 0 0)
        TransformAxis translation2: axis=(0 1 0)
        TransformAxis translation3: axis=(0 0 1)
    CustomJoint femur_r_to_pelvis: socket_parent_frame=pelvis_b_offset socket_child_frame=femur_r_b_offset
      Coordinate hip_flexion_r: range=(-1.5 1.8)
      Coordinate hip_adduction_r: range=(-1.2 0.8)
      Coordinate hip_rotation_r: range=(-0.8 0.8)
      PhysicalOffsetFrame pelvis_b_offset: socket_parent=/bodyset/pelvis_b
          translation=(-0.003627632 -0.04083052 0.07131127) orientation=(-0.01257613 -0.03664966 0.001085589)
      PhysicalOffsetFrame femur_r_b_offset: socket_parent=/bodyset/femur_r_b
          translation=(-0.008721982 0.1666229 -0.01081922) orientation=(-0.01257613 0.02981415 0.04618958)
      SpatialTransform:
        TransformAxis rotation1: coordinates=hip_flexion_r axis=(0 0 1) LinearFunction(coefficients=1 0)
        TransformAxis rotation2: coordinates=hip_adduction_r axis=(1 0 0) LinearFunction(coefficients=1 0)
        TransformAxis rotation3: coordinates=hip_rotation_r axis=(0 1 0) LinearFunction(coefficients=1 0)
        TransformAxis translation1: axis=(1 0 0)
        TransformAxis translation2: axis=(0 1 0)
        TransformAxis translation3: axis=(0 0 1)
    PinJoint tibfib_l_to_femur_l: socket_parent_frame=femur_l_b_offset socket_child_frame=tibfib_l_b_offset
      Coordinate knee_flexion_l: range=(-2.2 0)
      PhysicalOffsetFrame femur_l_b_offset: socket_parent=/bodyset/femur_l_b
          translation=(-0.0128862 -0.1612899 -0.003652319) orientation=(0.09069018 -0.03873276 -0.005470324)
      PhysicalOffsetFrame tibfib_l_b_offset: socket_parent=/bodyset/tibfib_l_b
          translation=(-0.009047618 0.1815406 0.007125188) orientation=(0.09069018 -0.03873276 0.1709893)
    PinJoint tibfib_r_to_femur_r: socket_parent_frame=femur_r_b_offset socket_child_frame=tibfib_r_b_offset
      Coordinate knee_flexion_r: range=(-2.2 0)
      PhysicalOffsetFrame femur_r_b_offset: socket_parent=/bodyset/femur_r_b
          translation=(0.006163729 -0.1631386 -0.005334884) orientation=(-0.02908531 0.02981415 -0.001381663)
      PhysicalOffsetFrame tibfib_r_b_offset: socket_parent=/bodyset/tibfib_r_b
          translation=(0.01134933 0.1793623 -0.005706569) orientation=(-0.02908531 0.02981415 -0.09695186)
    PinJoint talus_l_to_tibfib_l: socket_parent_frame=tibfib_l_b_offset socket_child_frame=talus_l_b_offset
      Coordinate ankle_angle_l: range=(-1 0.8)
      PhysicalOffsetFrame tibfib_l_b_offset: socket_parent=/bodyset/tibfib_l_b
          translation=(0.006759762 -0.1361383 -0.01011526) orientation=(-0.0620572 0.4411975 0.001477975)
      PhysicalOffsetFrame talus_l_b_offset: socket_parent=/bodyset/talus_l_b translation=(-0.001 0.017 -0.0025)
          orientation=(-0.0620572 0.2542668 -0.1124858)
    PinJoint talus_r_to_tibfib_r: socket_parent_frame=tibfib_r_b_offset socket_child_frame=talus_r_b_offset
      Coordinate ankle_angle_r: range=(-1 0.8)
      PhysicalOffsetFrame tibfib_r_b_offset: socket_parent=/bodyset/tibfib_r_b
          translation=(-0.01742641 -0.1351203 0.009323063) orientation=(-0.009940066 -0.4711383 0.0161304)
      PhysicalOffsetFrame talus_r_b_offset: socket_parent=/bodyset/talus_r_b translation=(-0.001 0.017 0.0025)
          orientation=(-0.009940066 -0.2266497 0.0681972)
  MarkerSet:
    Marker RHEE: calcn_r_b (-0.08624209 0.02727205 -0.01069182)
    Marker LHEE: calcn_l_b (-0.08440824 0.02809521 0.01110764)
    Marker LTOE: toes_l_b (-0.06489013 0.04566179 0.005470581)
    Marker RTOE: toes_r_b (-0.0606898 0.04602027 -0.00304026)
    Marker RASI: pelvis_b (0.06163087 0.002344874 0.1149858)
    Marker LASI: pelvis_b (0.06806858 -0.002970384 -0.1142054)
    Marker RPSI: pelvis_b (-0.06154253 0.0662255 0.03453731)
    Marker LPSI: pelvis_b (-0.0578917 0.06948547 -0.03808483)
    Marker lms_LASI: pelvis_b (0.05501246 0.003378444 -0.1129632)
    Marker lms_LPSI: pelvis_b (-0.04685701 0.05649067 -0.04300807)
    Marker lms_SAC: pelvis_b (-0.04673507 0.0603236 -0.001444629)
    Marker lms_RASI: pelvis_b (0.0466767 0.006237458 0.1143614)
    Marker lms_RPSI: pelvis_b (-0.04600529 0.06390162 0.04004561)
    Marker LTHI: femur_l_b (-0.009656688 -0.005382871 -0.1120887)
    Marker LPAT: femur_l_b (0.05605977 -0.1410953 0.009644584)
    Marker LKNE: femur_l_b (-0.01356495 -0.1635053 -0.05399728)
    Marker RTHI: femur_r_b (0.008301679 -0.03461036 0.1092353)
    Marker RPAT: femur_r_b (0.06858076 -0.1259896 -0.01389704)
    Marker RKNE: femur_r_b (0.003956329 -0.1594322 0.0448969)
    Marker lms_LLEC: femur_l_b (-0.01152885 -0.1581177 -0.03853476)
    Marker lms_LMEC: femur_l_b (-0.01424355 -0.1644621 0.03123012)
    Marker lms_RLEC: femur_r_b (0.007243792 -0.1620854 0.0308656)
    Marker lms_RMEC: femur_r_b (0.005083666 -0.1641918 -0.04153537)
    Marker LANK: tibfib_l_b (-0.003609628 -0.1340965 -0.04827612)
    Marker LTIB: tibfib_l_b (-0.02761687 0.04483253 -0.1075072)
    Marker LTOE_0: tibfib_l_b (0.05153714 -0.134078 -0.03740506)
    Marker LHEE_0: tibfib_l_b (-0.04759309 -0.1482984 -0.00909104)
    Marker lms_LMMAL: tibfib_l_b (0.01814521 -0.1346431 0.01394757)
    Marker lms_LLMAL: tibfib_l_b (-0.004625691 -0.1376335 -0.0341781)
    Marker RANK: tibfib_r_b (-0.03060193 -0.1332936 0.04492837)
    Marker RTIB: tibfib_r_b (-0.04292857 0.04343598 0.1050842)
    Marker RTOE_0: tibfib_r_b (0.029203 -0.1351964 0.03736044)
    Marker RHEE_0: tibfib_r_b (-0.06860558 -0.1443918 0.001762194)
    Marker lms_RMMAL: tibfib_r_b (-0.005636737 -0.1353504 -0.01382008)
    Marker lms_RLMAL: tibfib_r_b (-0.02921608 -0.1348903 0.03246621)
    Marker ori_l_glut_max: pelvis_b (-0.04066634 0.05799375 -0.04818744)
    Marker ori_r_glut_max: pelvis_b (-0.03891841 0.06424606 0.04557562)
    Marker ins_l_glut_max: femur_l_b (-0.004083435 0.08507555 -0.01282018)
    Marker ins_r_glut_max: femur_r_b (-0.01732305 0.08146103 0.01795773)
    Marker ori_l_glut_min: pelvis_b (0.009444282 0.0175349 -0.08808406)
    Marker ori_r_glut_min: pelvis_b (0.006547076 0.0207476 0.0902976)
    Marker ins_l_glut_min: femur_l_b (0.01044249 0.1472077 -0.02777293)
    Marker ins_r_glut_min: femur_r_b (-0.01117853 0.1441593 0.03725279)
    Marker ori_l_obt_int: pelvis_b (-0.01228454 -0.04719988 -0.03650912)
    Marker ori_r_obt_int: pelvis_b (-0.01526883 -0.04571494 0.03505325)
    Marker ins_l_obt_int: femur_l_b (0.008755208 0.1629559 -0.01888743)
    Marker ins_r_obt_int: femur_r_b (-0.01540511 0.1601128 0.02918195)
    Marker ori_l_obt_ext: pelvis_b (-0.01939207 -0.07275403 -0.03497503)
    Marker ori_r_obt_ext: pelvis_b (-0.02235307 -0.07030133 0.03371944)
    Marker ins_l_obt_ext: femur_l_b (-0.006148165 0.1554694 -0.009436251)
    Marker ins_r_obt_ext: femur_r_b (-0.02930309 0.1510435 0.01891421)
    Marker ori_l_gem_1: pelvis_b (-0.0416816 -0.03811466 -0.04666578)
    Marker ori_r_gem_1: pelvis_b (-0.04580115 -0.03573905 0.04428497)
    Marker ori_l_gem_2: pelvis_b (-0.0486043 -0.05221668 -0.0498691)
    Marker ori_r_gem_2: pelvis_b (-0.05354547 -0.0499302 0.04603015)
    Marker ins_l_gem: femur_l_b (0.008755208 0.1629559 -0.01888743)
    Marker ins_r_gem: femur_r_b (-0.01540511 0.1601128 0.02918195)
    Marker ori_l_quad_fem: pelvis_b (-0.03841113 -0.06906996 -0.05691989)
    Marker ori_r_quad_fem: pelvis_b (-0.04327325 -0.06871103 0.05305639)
    Marker ins_l_quad_fem: femur_l_b (-0.01430387 0.1342695 -0.009073029)
    Marker ins_r_quad_fem: femur_r_b (-0.03475815 0.1290776 0.01699798)
    Marker ori_l_sar: pelvis_b (0.0384515 -0.007007789 -0.09813279)
    Marker ori_r_sar: pelvis_b (0.03340606 -0.004229903 0.1003454)
    Marker ori_l_rect_fem_1: pelvis_b (0.007582272 -0.01142829 -0.08600555)
    Marker ori_r_rect_fem_1: pelvis_b (0.003775761 -0.009082956 0.08665816)
    Marker ori_l_rect_fem_2: pelvis_b (0.02846143 -0.02378165 -0.0837993)
    Marker ori_r_rect_fem_2: pelvis_b (0.02234381 -0.02103981 0.08537387)
    Marker ori_l_pect: pelvis_b (0.03106063 -0.04484458 -0.03489875)
    Marker ori_r_pect: pelvis_b (0.02765865 -0.04481371 0.03626713)
    Marker ins_l_pect: femur_l_b (0.0001425833 0.09314857 0.002352584)
    Marker ins_r_pect: femur_r_b (-0.01401472 0.09095076 0.003156127)
    Marker ori_l_add_long: pelvis_b (0.02961396 -0.06893039 -0.01532746)
    Marker ori_r_add_long: pelvis_b (0.02624827 -0.06791917 0.01658592)
    Marker ins_l_add_long: femur_l_b (0.0006992623 -0.02470214 0.0008887046)
    Marker ins_r_add_long: femur_r_b (0.002874278 -0.02609551 -0.001991252)
    Marker ori_l_add_brev: pelvis_b (0.01221658 -0.0722122 -0.01768634)
    Marker ori_r_add_brev: pelvis_b (0.009322427 -0.07038408 0.01864475)
    Marker ins_l_add_brev: femur_l_b (-0.0006422128 0.06638791 -0.001553366)
    Marker ins_r_add_brev: femur_r_b (-0.01117548 0.06420984 0.005602306)
    Marker ori_l_grac: pelvis_b (0.005188282 -0.07892586 -0.009145302)
    Marker ori_r_grac: pelvis_b (0.004500007 -0.07612601 0.009015671)
    Marker ori_l_bifemlh: pelvis_b (-0.0504593 -0.06356419 -0.051841)
    Marker ori_r_bifemlh: pelvis_b (-0.05563934 -0.06366593 0.04732526)
    Marker ori_l_bifemsh: femur_l_b (-0.00173726 -0.01765892 -0.00863654)
    Marker ori_r_bifemsh: femur_r_b (-0.000827439 -0.02009142 0.008193819)
    Marker ori_l_semimem: pelvis_b (-0.04473136 -0.05714776 -0.05811976)
    Marker ori_r_semimem: pelvis_b (-0.05033512 -0.05615274 0.05483695)
    Marker ori_l_iliacus: pelvis_b (0.01905496 0.0392591 -0.0863678)
    Marker ori_r_iliacus: pelvis_b (0.01663684 0.04247917 0.09075988)
    Marker ins_l_iliacus: femur_l_b (-0.002537261 0.1195111 0.01140572)
    Marker ins_r_iliacus: femur_r_b (-0.02049587 0.1171546 -0.004605864)
    Marker ori_l_glut_med: pelvis_b (-0.002517902 0.05527285 -0.08231114)
    Marker ori_r_glut_med: pelvis_b (-0.00315914 0.0574703 0.08467434)
    Marker ins_l_glut_med: femur_l_b (-0.008075645 0.1510716 -0.02520201)
    Marker ins_r_glut_med: femur_r_b (-0.03056855 0.1456487 0.03475547)
    Marker ori_l_add_mag: pelvis_b (-0.02130888 -0.08283544 -0.03152309)
    Marker ori_r_add_mag: pelvis_b (-0.02283778 -0.08039883 0.02880389)
    Marker ins_l_add_mag_1: femur_l_b (-0.01592214 -0.1503847 0.02830707)
    Marker ins_r_add_mag_1: femur_r_b (0.002362627 -0.1511685 -0.03711936)
    Marker ins_l_add_mag_2: femur_l_b (-0.001963696 0.01754641 -0.004202758)
    Marker ins_r_add_mag_2: femur_r_b (-0.005821746 0.01525522 0.005551417)
    Marker ori_l_semiten: pelvis_b (-0.04562542 -0.07409184 -0.04161195)
    Marker ori_r_semiten: pelvis_b (-0.04784833 -0.07333003 0.03669585)
    Marker ori_l_vas_lat: femur_l_b (0.002563647 0.04932843 -0.01864667)
    Marker ori_r_vas_lat: femur_r_b (-0.005706166 0.04625797 0.02214085)
