# OpenSim document version 40600
Model Muscle_Jinella_02_Optimised:
  Ground
  BodySet:
    Body talus_l_b: mass=0.07297313 [kg] mass_center=(0 0 0) inertia=(0.0005799729 0.0005799729 0.0005799729 0 0 0)
      PhysicalOffsetFrame l_talus_offset: socket_parent=.. translation=(-0.00370185 0.00077895 -0.0002443801) [meters]
          meshes=l_talus.vtp
    Body talus_r_b: mass=0.7297313 mass_center=(0 0 0) inertia=(0.005799729 0.005799729 0.005799729 0 0 0)
      PhysicalOffsetFrame r_talus_offset: socket_parent=.. translation=(-0.003701852 0.00077895 0.0002443868)
          meshes=r_talus.vtp
    Body calcn_l_b: mass=0.7297313 mass_center=(0 0 0) inertia=(0.005799729 0.005799729 0.005799729 0 0 0)
      PhysicalOffsetFrame l_foot_offset: socket_parent=.. translation=(-0.05817619 -0.01109786 0.002138266)
          meshes=l_foot.vtp
    Body toes_l_b: mass=0.1459463 mass_center=(0 0 0) inertia=(0.001159946 0.001159946 0.001159946 0 0 0)
      PhysicalOffsetFrame l_bofoot_offset: socket_parent=.. translation=(-0.01368478 0.0006970424 0.005533225)
          meshes=l_bofoot.vtp
    Body calcn_r_b: mass=0.07297313 mass_center=(0 0 0) inertia=(0.0005799729 0.0005799729 0.0005799729 0 0 0)
      PhysicalOffsetFrame r_foot_offset: socket_parent=.. translation=(-0.05817619 -0.01109786 -0.002138266)
          meshes=r_foot.vtp
    Body toes_r_b: mass=0.1459463 mass_center=(0 0 0) inertia=(0.001159946 0.001159946 0.001159946 0 0 0)
      PhysicalOffsetFrame r_bofoot_offset: socket_parent=.. translation=(-0.01368478 0.0006970424 -0.005533225)
          meshes=r_bofoot.vtp
    Body pelvis_b: mass=6.694363 mass_center=(-0.01 0 0) inertia=(0.1029902 0.1029902 0.1029902 0 0 0)
      PhysicalOffsetFrame combined_pelvis_mesh_offset: socket_parent=.. translation=(-0.6081259 -0.7359257 0.05873129)
          orientation=(-1.5708 0 0) [radians]
          meshes=(C:/Users/jplu752/Documents/My Project Stuff/opensim_model_creator/src/opensim_model_creator/Participants/Jinella 02 Optimised\Meshes/combined_pelvis_mesh.stl)
      WrapCylinder l_glut_max_1_1_pelvis_wrap: xyz_body_rotation=(0.75 -0.39 0)
          translation=(-0.005225316 -0.01769433 -0.06178509) quadrant=-x radius=0.02643042 length=0.1
      WrapCylinder r_glut_max_1_1_pelvis_wrap: xyz_body_rotation=(-0.75 0.39 0)
          translation=(-0.02855935 -0.01384529 0.04811313) quadrant=-x radius=0.02643042 length=0.1
    Body femur_l_b: mass=6.179412 mass_center=(0 -0.125 0) inertia=(0.1029902 0.02574755 0.1029902 0 0 0)
      PhysicalOffsetFrame RCH02_predicted_mesh_left_femur_offset: socket_parent=..
          translation=(-0.6028981 -0.5611096 0.1381965) orientation=(-1.5708 0 0)
          meshes=(C:/Users/jplu752/Documents/My Project Stuff/opensim_model_creator/src/opensim_model_creator/Participants/Jinella 02 Optimised\Meshes/RCH02_predicted_mesh_left_femur.stl)
      WrapCylinder l_glut_max_1_1_femur_wrap: xyz_body_rotation=(-0.143263 -0.123715 0.421776)
          translation=(-0.00514908 0.1246937 0.00157209) quadrant=-x radius=0.01189369 length=0.1
    Body femur_r_b: mass=6.179412 mass_center=(0 -0.125 0) inertia=(0.1029902 0.02574755 0.1029902 0 0 0)
      PhysicalOffsetFrame RCH02_predicted_mesh_right_femur_offset: socket_parent=..
          translation=(-0.5668269 -0.5655742 0.004335981) orientation=(-1.5708 0 0)
          meshes=(C:/Users/jplu752/Documents/My Project Stuff/opensim_model_creator/src/opensim_model_creator/Participants/Jinella 02 Optimised\Meshes/RCH02_predicted_mesh_right_femur.stl)
    Body tibfib_l_b: mass=2.574755 mass_center=(0 -0.12 0) inertia=(0.02574755 0.002574755 0.02574755 0 0 0)
      PhysicalOffsetFrame RCH02_predicted_mesh_left_tibfib_offset: socket_parent=..
          translation=(-0.5623553 -0.2753673 0.1488396) orientation=(-1.5708 0 0)
          meshes=(C:/Users/jplu752/Documents/My Project Stuff/opensim_model_creator/src/opensim_model_creator/Participants/Jinella 02 Optimised\Meshes/RCH02_predicted_mesh_left_tibfib.stl)
    Body tibfib_r_b: mass=2.574755 mass_center=(0 -0.12 0) inertia=(0.02574755 0.002574755 0.02574755 0 0 0)
      PhysicalOffsetFrame RCH02_predicted_mesh_right_tibfib_offset: socket_parent=..
          translation=(-0.5170433 -0.2774686 0.01283692) orientation=(-1.5708 0 0)
          meshes=(C:/Users/jplu752/Documents/My Project Stuff/opensim_model_creator/src/opensim_model_creator/Participants/Jinella 02 Optimised\Meshes/RCH02_predicted_mesh_right_tibfib.stl)
  JointSet:
    CustomJoint calcn_l_to_talus_l: socket_parent_frame=talus_l_b_offset socket_child_frame=calcn_l_b_offset
      Coordinate subtalar_angle_l: default_value=0 range=(-1 1)
      PhysicalOffsetFrame talus_l_b_offset: socket_parent=/bodyset/talus_l_b
          translation=(0.002816406 -0.008862594 -0.002772524)
      PhysicalOffsetFrame calcn_l_b_offset: socket_parent=/bodyset/calcn_l_b
          translation=(-0.0201601 0.008109105 0.003764671)
      SpatialTransform: axes_held_at_zero=(translation1 translation2 translation3)
        TransformAxis rotation1: coordinates=subtalar_angle_l axis=(-0.78718 -0.604747 -0.120949)
            LinearFunction(coefficients=1 0)
        TransformAxis rotation2: axis=(0 1 0)
        TransformAxis rotation3: axis=(-0.120949 0 0.78718)
    WeldJoint toes_l_to_calcn_l: socket_parent_frame=calcn_l_b_offset socket_child_frame=toes_l_b_offset
      PhysicalOffsetFrame calcn_l_b_offset: socket_parent=/bodyset/calcn_l_b
          translation=(0.03784008 -0.005897341 -0.001653697)
      PhysicalOffsetFrame toes_l_b_offset: socket_parent=/bodyset/toes_l_b
          translation=(-0.03784008 0.005897341 0.001653697)
    CustomJoint calcn_r_to_talus_r: socket_parent_frame=talus_r_b_offset socket_child_frame=calcn_r_b_offset
      Coordinate subtalar_angle_r: default_value=0 range=(-1 1)
      PhysicalOffsetFrame talus_r_b_offset: socket_parent=/bodyset/talus_r_b
          translation=(0.002816813 -0.008862644 0.002772683)
      PhysicalOffsetFrame calcn_r_b_offset: socket_parent=/bodyset/calcn_r_b
          translation=(-0.02016076 0.008108656 -0.003670757)
      SpatialTransform: axes_held_at_zero=(translation1 translation2 translation3)
        TransformAxis rotation1: coordinates=subtalar_angle_r axis=(0.78718 0.604747 -0.120949)
            LinearFunction(coefficients=1 0)
        TransformAxis rotation2: axis=(0 1 0)
        TransformAxis rotation3: axis=(-0.120949 0 -0.78718)
    WeldJoint toes_r_to_calcn_r: socket_parent_frame=calcn_r_b_offset socket_child_frame=toes_r_b_offset
      PhysicalOffsetFrame calcn_r_b_offset: socket_parent=/bodyset/calcn_r_b
          translation=(0.03783975 -0.005897453 0.001700598)
      PhysicalOffsetFrame toes_r_b_offset: socket_parent=/bodyset/toes_r_b
          translation=(-0.03783975 0.005897454 -0.001700605)
    FreeJoint pelvis_to_ground: socket_parent_frame=ground_offset socket_child_frame=pelvis_b_offset
      Coordinate pelvis_list
      Coordinate pelvis_rotation
      Coordinate pelvis_tilt
      Coordinate pelvis_tx
      Coordinate pelvis_ty
      Coordinate pelvis_tz
      PhysicalOffsetFrame ground_offset: socket_parent=/ground translation=(0 0.6343592 0)
      PhysicalOffsetFrame pelvis_b_offset: socket_parent=/bodyset/pelvis_b translation=(0 0 0)
          orientation=(0 -0.2027504 0)
    CustomJoint femur_l_to_pelvis: socket_parent_frame=pelvis_b_offset socket_child_frame=femur_l_b_offset
      Coordinate hip_flexion_l: range=(-1.5 1.8)
      Coordinate hip_adduction_l: range=(-0.8 1.2)
      Coordinate hip_rotation_l: range=(-0.8 0.8)
      PhysicalOffsetFrame pelvis_b_offset: socket_parent=/bodyset/pelvis_b
          translation=(0.008637949 -0.03643377 -0.06670617) orientation=(-0.03021292 -0.2027504 -0.005027634)
      PhysicalOffsetFrame femur_l_b_offset: socket_parent=/bodyset/femur_l_b
          translation=(0.01386569 0.1383823 0.012759) orientation=(-0.03021292 -0.2435424 -0.08684841)
      SpatialTransform: axes_held_at_zero=(translation1 translation2 translation3)
        TransformAxis rotation1: coordinates=hip_flexion_l axis=(0 0 1) LinearFunction(coefficients=1 0)
        TransformAxis rotation2: coordinates=hip_adduction_l axis=(1 0 0) LinearFunction(coefficients=1 0)
        TransformAxis rotation3: coordinates=hip_rotation_l axis=(0 1 0) LinearFunction(coefficients=1 0)
    CustomJoint femur_r_to_pelvis: socket_parent_frame=pelvis_b_offset socket_child_frame=femur_r_b_offset
      Coordinate hip_flexion_r: range=(-1.5 1.8)
      Coordinate hip_adduction_r: range=(-1.2 0.8)
      Coordinate hip_rotation_r: range=(-0.8 0.8)
      PhysicalOffsetFrame pelvis_b_offset: socket_parent=/bodyset/pelvis_b
          translation=(-0.01779248 -0.03174216 0.05720077) orientation=(-0.03021292 -0.2027504 -0.007742436)
      PhysicalOffsetFrame femur_r_b_offset: socket_parent=/bodyset/femur_r_b
          translation=(0.02350651 0.1386093 0.002805467) orientation=(-0.03021292 -0.009585609 -0.1723972)
      SpatialTransform: axes_held_at_zero=(translation1 translation2 translation3)
        TransformAxis rotation1: coordinates=hip_flexion_r axis=(0 0 1) LinearFunction(coefficients=1 0)
        TransformAxis rotation2: coordinates=hip_adduction_r axis=(1 0 0) LinearFunction(coefficients=1 0)
        TransformAxis rotation3: coordinates=hip_rotation_r axis=(0 1 0) LinearFunction(coefficients=1 0)
    PinJoint tibfib_l_to_femur_l: socket_parent_frame=femur_l_b_offset socket_child_frame=tibfib_l_b_offset
      Coordinate knee_flexion_l: range=(-2.2 0)
      PhysicalOffsetFrame femur_l_b_offset: socket_parent=/bodyset/femur_l_b
          translation=(-0.00868043 -0.1362595 -5.039242e-5) orientation=(-0.001374892 -0.1835935 -0.02739466)
      PhysicalOffsetFrame tibfib_l_b_offset: socket_parent=/bodyset/tibfib_l_b
          translation=(0.03186235 0.1494828 0.01059275) orientation=(-0.001374892 -0.1835935 -0.1289372)
    PinJoint tibfib_r_to_femur_r: socket_parent_frame=femur_r_b_offset socket_child_frame=tibfib_r_b_offset
      Coordinate knee_flexion_r: range=(-2.2 0)
      PhysicalOffsetFrame femur_r_b_offset: socket_parent=/bodyset/femur_r_b
          translation=(-0.02243348 -0.1375037 -0.01152395) orientation=(0.09661957 -0.06952451 -0.0004173573)
      PhysicalOffsetFrame tibfib_r_b_offset: socket_parent=/bodyset/tibfib_r_b
          translation=(0.02735012 0.1506019 -0.003023007) orientation=(0.09661957 -0.06952451 0.01140297)
    PinJoint talus_l_to_tibfib_l: socket_parent_frame=tibfib_l_b_offset socket_child_frame=talus_l_b_offset
      Coordinate ankle_angle_l: range=(-1 0.8)
      PhysicalOffsetFrame tibfib_l_b_offset: socket_parent=/bodyset/tibfib_l_b
          translation=(-0.03099969 -0.1139284 -0.01043553) orientation=(-0.01051297 0.2795307 0.009125154)
      PhysicalOffsetFrame talus_l_b_offset: socket_parent=/bodyset/talus_l_b
          translation=(-0.0008915021 0.01515554 -0.002228755) orientation=(-0.01051297 0.1717873 0.2327289)
    PinJoint talus_r_to_tibfib_r: socket_parent_frame=tibfib_r_b_offset socket_child_frame=talus_r_b_offset
      Coordinate ankle_angle_r: range=(-1 0.8)
      PhysicalOffsetFrame tibfib_r_b_offset: socket_parent=/bodyset/tibfib_r_b
          translation=(-0.0241662 -0.1125287 -0.003476017) orientation=(0.01649472 -0.5252873 -0.03440958)
      PhysicalOffsetFrame talus_r_b_offset: socket_parent=/bodyset/talus_r_b
          translation=(-0.0008915021 0.01515554 0.002228755) orientation=(0.01649472 -0.2682649 0.1692463)
  ForceSet:
    Millard2012EquilibriumMuscle [values shared by the 28 below unless stated]: min_control=0.01 max_control=1
        max_isometric_force=500 optimal_fiber_length=0.04 tendon_slack_length=0.2
        pennation_angle_at_optimal=0.1 [radians] max_contraction_velocity=10
      ActiveForceLengthCurve: minimum_value=0
      ForceVelocityCurve: concentric_slope_at_vmax=0 concentric_slope_near_vmax=0.25 isometric_slope=5
          eccentric_slope_at_vmax=0 eccentric_slope_near_vmax=0.15 max_eccentric_velocity_force_multiplier=1.4
      FiberForceLengthCurve
      TendonForceLengthCurve
    Millard2012EquilibriumMuscle l_glut_max_1_1:
      PathPoint origin: pelvis_b (-0.02671463 0.04756296 -0.05332932)
      PathPoint insertion: femur_l_b (0.002389353 0.06938689 -0.0149725)
      PathWrap: wrap_object=l_glut_max_1_1_pelvis_wrap method=hybrid
      PathWrap pathwrap_0: wrap_object=l_glut_max_1_1_femur_wrap method=hybrid
    Millard2012EquilibriumMuscle r_glut_max_1_1:
      PathPoint origin: pelvis_b (-0.03940471 0.05576237 0.02544376)
      PathPoint insertion: femur_r_b (-0.0005245108 0.06794544 0.02123333)
      PathWrap: wrap_object=r_glut_max_1_1_pelvis_wrap method=hybrid
    Millard2012EquilibriumMuscle l_glut_min_1_1:
      PathPoint origin: pelvis_b (0.02033053 0.01640782 -0.07507215)
      PathPoint insertion: femur_l_b (0.01715721 0.1196051 -0.02559298)
    Millard2012EquilibriumMuscle r_glut_min_1_1:
      PathPoint origin: pelvis_b (-0.006907685 0.0225227 0.0668822)
      PathPoint insertion: femur_r_b (0.01441493 0.1173937 0.03998324)
    Millard2012EquilibriumMuscle l_obt_int_1_1:
      PathPoint origin: pelvis_b (-0.009833873 -0.04025573 -0.03852541)
      PathPoint insertion: femur_l_b (0.01363465 0.1334253 -0.01931618)
    Millard2012EquilibriumMuscle r_obt_int_1_1:
      PathPoint origin: pelvis_b (-0.0253548 -0.03802783 0.02479752)
      PathPoint insertion: femur_r_b (0.01396796 0.1316973 0.03429504)
    Millard2012EquilibriumMuscle l_obt_ext_1_1:
      PathPoint origin: pelvis_b (-0.01716438 -0.06387963 -0.04083854)
      PathPoint insertion: femur_l_b (-0.0002619747 0.1274022 -0.01438385)
    Millard2012EquilibriumMuscle r_obt_ext_1_1:
      PathPoint origin: pelvis_b (-0.03304566 -0.05879999 0.02543602)
      PathPoint insertion: femur_r_b (0.001119662 0.1270296 0.02508449)
    Millard2012EquilibriumMuscle l_gem_1_1:
      PathPoint origin: pelvis_b (-0.03325958 -0.02829175 -0.04984952)
      PathPoint insertion: femur_l_b (0.01363465 0.1334253 -0.01931618)
    Millard2012EquilibriumMuscle r_gem_1_1:
      PathPoint origin: pelvis_b (-0.0512172 -0.02560646 0.02906565)
      PathPoint insertion: femur_r_b (0.01396796 0.1316973 0.03429504)
    Millard2012EquilibriumMuscle l_gem_2_1:
      PathPoint origin: pelvis_b (-0.03711348 -0.04045722 -0.05492596)
      PathPoint insertion: femur_l_b (0.01363465 0.1334253 -0.01931618)
    Millard2012EquilibriumMuscle r_gem_2_1:
      PathPoint origin: pelvis_b (-0.05788763 -0.03766768 0.03167932)
      PathPoint insertion: femur_r_b (0.01396796 0.1316973 0.03429504)
    Millard2012EquilibriumMuscle l_quad_fem_1_1:
      PathPoint origin: pelvis_b (-0.02817789 -0.05768996 -0.06133304)
      PathPoint insertion: femur_l_b (-0.007706884 0.109674 -0.0155088)
    Millard2012EquilibriumMuscle r_quad_fem_1_1:
      PathPoint origin: pelvis_b (-0.05132225 -0.05365222 0.040014)
      PathPoint insertion: femur_r_b (-0.007385699 0.1100828 0.02199029)
    Millard2012EquilibriumMuscle l_pect_1_1:
      PathPoint origin: pelvis_b (0.0262016 -0.04052045 -0.03110159)
      PathPoint insertion: femur_l_b (0.003319444 0.07690125 -0.001812342)
    Millard2012EquilibriumMuscle r_pect_1_1:
      PathPoint origin: pelvis_b (0.01058826 -0.03969882 0.02905341)
      PathPoint insertion: femur_r_b (0.004589053 0.07634369 0.00964751)
    Millard2012EquilibriumMuscle l_add_long_1_1:
      PathPoint origin: pelvis_b (0.02018398 -0.06267689 -0.01898877)
      PathPoint insertion: femur_l_b (0.003086706 -0.02260649 0.0014465)
    Millard2012EquilibriumMuscle r_add_long_1_1:
      PathPoint origin: pelvis_b (0.009157733 -0.06071856 0.01533581)
      PathPoint insertion: femur_r_b (-0.001210444 -0.02399342 -0.0008797109)
    Millard2012EquilibriumMuscle l_add_brev_1_1:
      PathPoint origin: pelvis_b (0.007065469 -0.06480131 -0.02282842)
      PathPoint insertion: femur_l_b (0.003245647 0.05446533 -0.004399481)
    Millard2012EquilibriumMuscle r_add_brev_1_1:
      PathPoint origin: pelvis_b (-0.004758717 -0.06165673 0.01537484)
      PathPoint insertion: femur_r_b (0.002342715 0.0534029 0.01028587)
    Millard2012EquilibriumMuscle l_iliacus_1_1:
      PathPoint origin: pelvis_b (0.02843572 0.03397917 -0.07023686)
      PathPoint insertion: femur_l_b (3.225679e-5 0.09880845 0.002867821)
    Millard2012EquilibriumMuscle r_iliacus_1_1:
      PathPoint origin: pelvis_b (0.003061047 0.03977017 0.06558658)
      PathPoint insertion: femur_r_b (0.004180956 0.09951894 0.005546499)
    Millard2012EquilibriumMuscle l_glut_med_1_1:
      PathPoint origin: pelvis_b (0.01104412 0.04675312 -0.07224344)
      PathPoint insertion: femur_l_b (0.001039334 0.1219935 -0.02659329)
    Millard2012EquilibriumMuscle r_glut_med_1_1:
      PathPoint origin: pelvis_b (-0.01249011 0.05270469 0.05924696)
      PathPoint insertion: femur_r_b (-0.001593484 0.1214718 0.03700356)
    Millard2012EquilibriumMuscle l_add_mag_1_1:
      PathPoint origin: pelvis_b (-0.01951851 -0.07217301 -0.03857587)
      PathPoint insertion: femur_l_b (-0.01766864 -0.1257486 0.02694693)
    Millard2012EquilibriumMuscle r_add_mag_1_1:
      PathPoint origin: pelvis_b (-0.03315734 -0.06681129 0.02243151)
      PathPoint insertion: femur_r_b (-0.02251941 -0.1251165 -0.03809512)
    Millard2012EquilibriumMuscle l_add_mag_1_2:
      PathPoint origin: pelvis_b (-0.01951851 -0.07217301 -0.03857587)
      PathPoint insertion: femur_l_b (0.002105867 0.01287872 -0.00510196)
    Millard2012EquilibriumMuscle r_add_mag_1_2:
      PathPoint origin: pelvis_b (-0.03315734 -0.06681129 0.02243151)
      PathPoint insertion: femur_r_b (-0.0016543 0.01158086 0.007640615)
  MarkerSet:
    Marker RHEE: calcn_r_b (-0.07938344 0.03433818 -0.008647952)
    Marker LHEE: calcn_l_b (-0.07649606 0.03518035 0.01246352)
    Marker LTOE: toes_l_b (-0.05684344 0.04739167 0.007020776)
    Marker RTOE: toes_r_b (-0.05776231 0.05821895 -0.0003802497)
    Marker RASI: pelvis_b (0.03616748 0.003248897 0.0913819)
    Marker LASI: pelvis_b (0.06749646 -0.01072297 -0.08402388)
    Marker RPSI: pelvis_b (-0.05835389 0.06091015 0.01172867)
    Marker LPSI: pelvis_b (-0.04615678 0.05412478 -0.05825777)
    Marker LTHI: femur_l_b (0.009862745 -0.009139041 -0.1099728)
    Marker LPAT: femur_l_b (0.03992868 -0.1084151 0.02108641)
    Marker LKNE: femur_l_b (-0.005310193 -0.1407949 -0.0468548)
    Marker RTHI: femur_r_b (-0.006667458 -0.03498671 0.1029125)
    Marker RPAT: femur_r_b (0.03368009 -0.1145031 -0.01357255)
    Marker RKNE: femur_r_b (-0.03079761 -0.1377207 0.03188886)
    Marker LANK: tibfib_l_b (-0.03902692 -0.1191947 -0.043643)
    Marker LTIB: tibfib_l_b (0.004596017 0.03968707 -0.1019168)
    Marker RANK: tibfib_r_b (-0.03594707 -0.1201879 0.02951884)
    Marker RTIB: tibfib_r_b (-0.02638994 0.03511841 0.08749898)
