# OpenSim document version 40500
Model Optimised_Knee_Moved_Markers:
  Ground
  BodySet:
    Body talus_l_b: mass=0.07297313 [kg] mass_center=(0 0 0) inertia=(0.0005799729 0.0005799729 0.0005799729 0 0 0)
      PhysicalOffsetFrame l_talus_offset: socket_parent=.. translation=(-0.00370185 0.00077895 -0.0002443801) [meters]
          meshes=l_talus.vtp
    Body talus_r_b: mass=0.7297313 mass_center=(0 0 0) inertia=(0.005799729 0.005799729 0.005799729 0 0 0)
      PhysicalOffsetFrame r_talus_offset: socket_parent=.. translation=(-0.003701852 0.00077895 0.0002443868)
          meshes=r_talus.vtp
    Body calcn_l_b: mass=0.7297313 mass_center=(0 0 0) inertia=(0.005799729 0.005799729 0.005799729 0 0 0)
      PhysicalOffsetFrame l_foot_offset: socket_parent=.. translation=(-0.05817619 -0.01109786 0.002138266)
          meshes=l_foot.vtp
    Body toes_l_b: mass=0.1459463 mass_center=(0 0 0) inertia=(0.001159946 0.001159946 0.001159946 0 0 0)
      PhysicalOffsetFrame l_bofoot_offset: socket_parent=.. translation=(-0.01368478 0.0006970424 0.005533225)
          meshes=l_bofoot.vtp
    Body calcn_r_b: mass=0.07297313 mass_center=(0 0 0) inertia=(0.0005799729 0.0005799729 0.0005799729 0 0 0)
      PhysicalOffsetFrame r_foot_offset: socket_parent=.. translation=(-0.05817619 -0.01109786 -0.002138266)
          meshes=r_foot.vtp
    Body toes_r_b: mass=0.1459463 mass_center=(0 0 0) inertia=(0.001159946 0.001159946 0.001159946 0 0 0)
      PhysicalOffsetFrame r_bofoot_offset: socket_parent=.. translation=(-0.01368478 0.0006970424 -0.005533225)
          meshes=r_bofoot.vtp
    Body pelvis_b: mass=6.694363 mass_center=(-0.01 0 0) inertia=(0.1029902 0.1029902 0.1029902 0 0 0)
      PhysicalOffsetFrame combined_pelvis_mesh_offset: socket_parent=.. translation=(-0.6081259 -0.7359257 0.05873129)
          orientation=(-1.5708 0 0) [radians]
          meshes=(C:/Users/jplu752/Documents/My Project Stuff/opensim_model_creator/src/opensim_model_creator/Participants/Jinella 02 Optimised\Meshes/combined_pelvis_mesh.stl)
    Body femur_l_b: mass=6.179412 mass_center=(0 -0.125 0) inertia=(0.1029902 0.02574755 0.1029902 0 0 0)
      PhysicalOffsetFrame RCH02_predicted_mesh_left_femur_offset: socket_parent=..
          translation=(-0.6028981 -0.5611096 0.1381965) orientation=(-1.5708 0 0)
          meshes=(C:/Users/jplu752/Documents/My Project Stuff/opensim_model_creator/src/opensim_model_creator/Participants/Jinella 02 Optimised\Meshes/RCH02_predicted_mesh_left_femur.stl)
    Body femur_r_b: mass=6.179412 mass_center=(0 -0.125 0) inertia=(0.1029902 0.02574755 0.1029902 0 0 0)
      PhysicalOffsetFrame RCH02_predicted_mesh_right_femur_offset: socket_parent=..
          translation=(-0.5668269 -0.5655742 0.004335981) orientation=(-1.5708 0 0)
          meshes=(C:/Users/jplu752/Documents/My Project Stuff/opensim_model_creator/src/opensim_model_creator/Participants/Jinella 02 Optimised\Meshes/RCH02_predicted_mesh_right_femur.stl)
    Body tibfib_l_b: mass=2.574755 mass_center=(0 -0.12 0) inertia=(0.02574755 0.002574755 0.02574755 0 0 0)
      PhysicalOffsetFrame RCH02_predicted_mesh_left_tibfib_offset: socket_parent=..
          translation=(-0.5623553 -0.2753673 0.1488396) orientation=(-1.5708 0 0)
          meshes=(C:/Users/jplu752/Documents/My Project Stuff/opensim_model_creator/src/opensim_model_creator/Participants/Jinella 02 Optimised\Meshes/RCH02_predicted_mesh_left_tibfib.stl)
    Body tibfib_r_b: mass=2.574755 mass_center=(0 -0.12 0) inertia=(0.02574755 0.002574755 0.02574755 0 0 0)
      PhysicalOffsetFrame RCH02_predicted_mesh_right_tibfib_offset: socket_parent=..
          translation=(-0.5170433 -0.2774686 0.01283692) orientation=(-1.5708 0 0)
          meshes=(C:/Users/jplu752/Documents/My Project Stuff/opensim_model_creator/src/opensim_model_creator/Participants/Jinella 02 Optimised\Meshes/RCH02_predicted_mesh_right_tibfib.stl)
  JointSet:
    CustomJoint calcn_l_to_talus_l: socket_parent_frame=talus_l_b_offset socket_child_frame=calcn_l_b_offset
      Coordinate subtalar_angle_l: default_value=0 range=(-1 1)
      PhysicalOffsetFrame talus_l_b_offset: socket_parent=/bodyset/talus_l_b
          translation=(0.002816406 -0.008862594 -0.002772524)
      PhysicalOffsetFrame calcn_l_b_offset: socket_parent=/bodyset/calcn_l_b
          translation=(-0.0201601 0.008109105 0.003764671)
      SpatialTransform: axes_held_at_zero=(translation1 translation2 translation3)
        TransformAxis rotation1: coordinates=subtalar_angle_l axis=(-0.78718 -0.604747 -0.120949)
            LinearFunction(coefficients=1 0)
        TransformAxis rotation2: axis=(0 1 0)
        TransformAxis rotation3: axis=(-0.120949 0 0.78718)
    WeldJoint toes_l_to_calcn_l: socket_parent_frame=calcn_l_b_offset socket_child_frame=toes_l_b_offset
      PhysicalOffsetFrame calcn_l_b_offset: socket_parent=/bodyset/calcn_l_b
          translation=(0.03784008 -0.005897341 -0.001653697)
      PhysicalOffsetFrame toes_l_b_offset: socket_parent=/bodyset/toes_l_b
          translation=(-0.03784008 0.005897341 0.001653697)
    CustomJoint calcn_r_to_talus_r: socket_parent_frame=talus_r_b_offset socket_child_frame=calcn_r_b_offset
      Coordinate subtalar_angle_r: default_value=0 range=(-1 1)
      PhysicalOffsetFrame talus_r_b_offset: socket_parent=/bodyset/talus_r_b
          translation=(0.002816813 -0.008862644 0.002772683)
      PhysicalOffsetFrame calcn_r_b_offset: socket_parent=/bodyset/calcn_r_b
          translation=(-0.02016076 0.008108656 -0.003670757)
      SpatialTransform: axes_held_at_zero=(translation1 translation2 translation3)
        TransformAxis rotation1: coordinates=subtalar_angle_r axis=(0.78718 0.604747 -0.120949)
            LinearFunction(coefficients=1 0)
        TransformAxis rotation2: axis=(0 1 0)
        TransformAxis rotation3: axis=(-0.120949 0 -0.78718)
    WeldJoint toes_r_to_calcn_r: socket_parent_frame=calcn_r_b_offset socket_child_frame=toes_r_b_offset
      PhysicalOffsetFrame calcn_r_b_offset: socket_parent=/bodyset/calcn_r_b
          translation=(0.03783975 -0.005897453 0.001700598)
      PhysicalOffsetFrame toes_r_b_offset: socket_parent=/bodyset/toes_r_b
          translation=(-0.03783975 0.005897454 -0.001700605)
    FreeJoint pelvis_to_ground: socket_parent_frame=ground_offset socket_child_frame=pelvis_b_offset
      Coordinate pelvis_list
      Coordinate pelvis_rotation
      Coordinate pelvis_tilt
      Coordinate pelvis_tx
      Coordinate pelvis_ty
      Coordinate pelvis_tz
      PhysicalOffsetFrame ground_offset: socket_parent=/ground translation=(0 0.6343592 0)
      PhysicalOffsetFrame pelvis_b_offset: socket_parent=/bodyset/pelvis_b translation=(0 0 0)
          orientation=(0 -0.2027504 0)
    CustomJoint femur_l_to_pelvis: socket_parent_frame=pelvis_b_offset socket_child_frame=femur_l_b_offset
      Coordinate hip_flexion_l: range=(-1.5 1.8)
      Coordinate hip_adduction_l: range=(-0.8 1.2)
      Coordinate hip_rotation_l: range=(-0.8 0.8)
      PhysicalOffsetFrame pelvis_b_offset: socket_parent=/bodyset/pelvis_b
          translation=(0.008637949 -0.03643377 -0.06670617) orientation=(-0.03021292 -0.2027504 -0.005027634)
      PhysicalOffsetFrame femur_l_b_offset: socket_parent=/bodyset/femur_l_b
          translation=(0.01386569 0.1383823 0.012759) orientation=(-0.03021292 -0.2435424 -0.08684841)
      SpatialTransform: axes_held_at_zero=(translation1 translation2 translation3)
        TransformAxis rotation1: coordinates=hip_flexion_l axis=(0 0 1) LinearFunction(coefficients=1 0)
        TransformAxis rotation2: coordinates=hip_adduction_l axis=(1 0 0) LinearFunction(coefficients=1 0)
        TransformAxis rotation3: coordinates=hip_rotation_l axis=(0 1 0) LinearFunction(coefficients=1 0)
    CustomJoint femur_r_to_pelvis: socket_parent_frame=pelvis_b_offset socket_child_frame=femur_r_b_offset
      Coordinate hip_flexion_r: range=(-1.5 1.8)
      Coordinate hip_adduction_r: range=(-1.2 0.8)
      Coordinate hip_rotation_r: range=(-0.8 0.8)
      PhysicalOffsetFrame pelvis_b_offset: socket_parent=/bodyset/pelvis_b
          translation=(-0.01779248 -0.03174216 0.05720077) orientation=(-0.03021292 -0.2027504 -0.007742436)
      PhysicalOffsetFrame femur_r_b_offset: socket_parent=/bodyset/femur_r_b
          translation=(0.02350651 0.1386093 0.002805467) orientation=(-0.03021292 -0.009585609 -0.1723972)
      SpatialTransform: axes_held_at_zero=(translation1 translation2 translation3)
        TransformAxis rotation1: coordinates=hip_flexion_r axis=(0 0 1) LinearFunction(coefficients=1 0)
        TransformAxis rotation2: coordinates=hip_adduction_r axis=(1 0 0) LinearFunction(coefficients=1 0)
        TransformAxis rotation3: coordinates=hip_rotation_r axis=(0 1 0) LinearFunction(coefficients=1 0)
    PinJoint tibfib_l_to_femur_l: socket_parent_frame=femur_l_b_offset socket_child_frame=tibfib_l_b_offset
      Coordinate knee_flexion_l: range=(-2.2 0)
      PhysicalOffsetFrame femur_l_b_offset: socket_parent=/bodyset/femur_l_b
          translation=(-0.00868043 -0.1362595 -5.039242e-5) orientation=(-0.001374892 -0.1835935 -0.02739466)
      PhysicalOffsetFrame tibfib_l_b_offset: socket_parent=/bodyset/tibfib_l_b
          translation=(0.03186235 0.1494828 0.01059275) orientation=(-0.001374892 -0.1835935 -0.1289372)
    PinJoint tibfib_r_to_femur_r: socket_parent_frame=femur_r_b_offset socket_child_frame=tibfib_r_b_offset
      Coordinate knee_flexion_r: range=(-2.2 0)
      PhysicalOffsetFrame femur_r_b_offset: socket_parent=/bodyset/femur_r_b
          translation=(-0.02243348 -0.1375037 -0.01152395) orientation=(0.09661957 -0.06952451 -0.0004173573)
      PhysicalOffsetFrame tibfib_r_b_offset: socket_parent=/bodyset/tibfib_r_b
          translation=(0.02735012 0.1506019 -0.003023007) orientation=(0.09661957 -0.06952451 0.01140297)
    PinJoint talus_l_to_tibfib_l: socket_parent_frame=tibfib_l_b_offset socket_child_frame=talus_l_b_offset
      Coordinate ankle_angle_l: range=(-1 0.8)
      PhysicalOffsetFrame tibfib_l_b_offset: socket_parent=/bodyset/tibfib_l_b
          translation=(-0.03099969 -0.1139284 -0.01043553) orientation=(-0.01051297 0.2795307 0.009125154)
      PhysicalOffsetFrame talus_l_b_offset: socket_parent=/bodyset/talus_l_b
          translation=(-0.0008915021 0.01515554 -0.002228755) orientation=(-0.01051297 0.1717873 0.2327289)
    PinJoint talus_r_to_tibfib_r: socket_parent_frame=tibfib_r_b_offset socket_child_frame=talus_r_b_offset
      Coordinate ankle_angle_r: range=(-1 0.8)
      PhysicalOffsetFrame tibfib_r_b_offset: socket_parent=/bodyset/tibfib_r_b
          translation=(-0.0241662 -0.1125287 -0.003476017) orientation=(0.01649472 -0.5252873 -0.03440958)
      PhysicalOffsetFrame talus_r_b_offset: socket_parent=/bodyset/talus_r_b
          translation=(-0.0008915021 0.01515554 0.002228755) orientation=(0.01649472 -0.2682649 0.1692463)
  MarkerSet:
    Marker RHEE: calcn_r_b (-0.07938344 0.03433818 -0.008647952)
    Marker LHEE: calcn_l_b (-0.07649606 0.03518035 0.01246352)
    Marker LTOE: toes_l_b (-0.05684344 0.04739167 0.007020776)
    Marker RTOE: toes_r_b (-0.05776231 0.05821895 -0.0003802497)
    Marker RASI: pelvis_b (0.03616748 0.003248897 0.0913819)
    Marker LASI: pelvis_b (0.06749646 -0.01072297 -0.08402388)
    Marker RPSI: pelvis_b (-0.05835389 0.06091015 0.01172867)
    Marker LPSI: pelvis_b (-0.04615678 0.05412478 -0.05825777)
    Marker LTHI: femur_l_b (0.009862745 -0.009139041 -0.1099728)
    Marker LPAT: femur_l_b (0.03992868 -0.1084151 0.02108641)
    Marker LKNE: femur_l_b (-0.005310193 -0.1407949 -0.0468548)
    Marker RTHI: femur_r_b (-0.006667458 -0.03498671 0.1029125)
    Marker RPAT: femur_r_b (0.03368009 -0.1145031 -0.01357255)
    Marker RKNE: femur_r_b (-0.03079761 -0.1377207 0.03188886)
    Marker LANK: tibfib_l_b (-0.03902692 -0.1191947 -0.043643)
    Marker LTIB: tibfib_l_b (0.004596017 0.03968707 -0.1019168)
    Marker RANK: tibfib_r_b (-0.03594707 -0.1201879 0.02951884)
    Marker RTIB: tibfib_r_b (-0.02638994 0.03511841 0.08749898)
