# OpenSim document version 40500
ScaleTool model-scaled:
  mass: 26.1 [kg]
  height: -1
  age: -1
  GenericModelMaker:
    model_file: C:/Users/jplu752/Documents/My Project Stuff/opensim_model_creator/src/opensim_model_creator/Participants/Jinella 02 Optimised\Models/Jinella_02_Optimised.osim
  ModelScaler:
    apply: true
    scaling_order: measurements
    marker_file: /Inputs/static.trc
    time_range: 0.34 0.63
    preserve_mass_distribution: false
    output_model_file: Models/scaled_foot.osim
    MeasurementSet:
      Measurement Pelvis: apply=false
        MarkerPair: markers=(RASI LASI)
        MarkerPair: markers=(RPSI LPSI)
      Measurement Thigh: apply=false
        MarkerPair: markers=(RASI RKNE)
        MarkerPair: markers=(LASI LKNE)
      Measurement Shank: apply=false
        MarkerPair: markers=(RKNE RANK)
        MarkerPair: markers=(LKNE LANK)
      Measurement Foot: apply=true
        MarkerPair: markers=(RHEE RTOE)
        MarkerPair: markers=(LHEE LTOE)
        BodyScale talus_l_b: axes=(X Y Z)
        BodyScale talus_r_b: axes=(X Y Z)
        BodyScale calcn_l_b: axes=(X Y Z)
        BodyScale toes_l_b: axes=(X Y Z)
        BodyScale calcn_r_b: axes=(X Y Z)
        BodyScale toes_r_b: axes=(X Y Z)
  MarkerPlacer:
    apply: true
    marker_file: /Inputs/static.trc
    time_range: 0.34 0.63
    output_model_file: /Models/scaled_foot.osim
    max_marker_movement: -1
    IKTaskSet:
      IKMarkerTask RHEE: apply=true weight=1
      IKMarkerTask LHEE: apply=true weight=1
      IKMarkerTask LTOE: apply=true weight=1
      IKMarkerTask RTOE: apply=true weight=1
      IKMarkerTask RASI: apply=true weight=5
      IKMarkerTask LASI: apply=true weight=5
      IKMarkerTask RPSI: apply=true weight=1
      IKMarkerTask LPSI: apply=true weight=1
      IKMarkerTask LTHI: apply=true weight=1
      IKMarkerTask LKNE: apply=true weight=2.5
      IKMarkerTask RTHI: apply=true weight=1
      IKMarkerTask RKNE: apply=true weight=2.5
      IKMarkerTask LANK: apply=true weight=10
      IKMarkerTask LTIB: apply=true weight=1
      IKMarkerTask RANK: apply=true weight=10
      IKMarkerTask RTIB: apply=true weight=1
